<neuroml xmlns="http://www.neuroml.org/schema/neuroml2"  xmlns:xs="http://www.w3.org/2001/XMLSchema" xmlns:xsi="http://www.w3.org/2001/XMLSchema-instance" xsi:schemaLocation="http://www.neuroml.org/schema/neuroml2 https://raw.github.com/NeuroML/NeuroML2/development/Schemas/NeuroML2/NeuroML_v2.3.1.xsd" id="na3">
    <ionChannelHH id="na3" species="Na" conductance="10 pS">
        <gate id="m" instances="3" type="gateHHrates">
            <q10Settings type="q10ExpTemp" q10Factor="2.3" experimentalTemp="23 degC"/>
            <forwardRate type="HHExpLinearRate" rate="0.182 per_ms" midpoint="-35 mV" scale="9 mV"/>
            <reverseRate type="HHExpLinearRate" rate="0.124 per_ms" midpoint="-35 mV" scale="-9 mV"/>
        </gate>
        <gate id="h" instances="1" type="gateHHratesInf">
            <q10Settings type="q10ExpTemp" q10Factor="2.3" experimentalTemp="23 degC"/>
            <forwardRate type="HHExpLinearRate" rate="0.124 per_ms" midpoint="-50 mV" scale="5 mV"/>
            <reverseRate type="HHExpLinearRate" rate="0.0091 per_ms" midpoint="-75 mV" scale="-5 mV"/>
            <steadyState type="HHSigmoidVariable" rate="1.0" midpoint="-65 mV" scale="-6.2 mV"/>
        </gate>
    </ionChannelHH>
</neuroml>
